# 11_1__Herst__Richardson__2_
t1 := 0
t2 := 0.5
b := 1.5
d := 1.8
M := 50
N := 5000
Δ := 60
i := 0 .. N
# функция  Вейерштрасса-Мандельброта
ξ[0] := 1
t[i] := (t2 - t1)/N*i
ξ[i] := sum((1 - cos(b^k*t[i]))/b^((2 - d)*k), k = 0 .. M)  # disabled
ξ[i + 1] := 1/2*(ξ[i] - 0.2/ξ[i])
# Оценка  фрактальной размерности, метод Ричардсона
L :=
    for j ∈ 1 .. Δ
        m ← trunc(N/j)
        Δt[j] ← (t2 - t1)/N*j
        r ← sqrt((ξ[N] - ξ[m*j])^2 + (t[N] - t[m*j])^2)
        L[j] ← sum(sqrt((ξ[n*j] - ξ[(n - 1)*j])^2 + Δt[j]^2), n = 1 .. m) + r
        Λ[j] ← log(L[j])
        ΔT[j] ← log(Δt[j])
    [ΔT; Λ]
y(x) := line(L[0], L[1])[0] + line(L[0], L[1])[1]*x
β := line(L[0], L[1])[1]
β = -1.12477
dd := 1 - β
dd = 2.12477
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# Определение показателя Херста
U := 49
Z :=
    for k ∈ 0 .. U
        τ[k] ← 100*(k + 1)
        for i ∈ 1 .. τ[k]
            y[i] ← ξ[i] - ξ[i - 1]
        sr[k] ← mean(y)
        for p ∈ 1 .. τ[k]
            Y[p] ← sum(y[j] - sr[k], j = 1 .. p)
        R[k] ← max(Y) - min(Y)
        S[k] ← stdev(y)
        RS[k] ← log(R[k]/S[k])
        T[k] ← log(τ[k]/2)
    [T; RS]  # disabled
Zz :=
    for k ∈ 0 .. U
        τ[k] ← 100*(k + 1)
        for i ∈ 1 .. τ[k]
            y[i] ← ξ[i] - ξ[i - 1]
        sr[k] ← mean(y)
        for p ∈ 1 .. τ[k]
            Y[p] ← ξ[p] - ξ[0] - sr[k]*p
        R[k] ← max(Y) - min(Y)
        S[k] ← stdev(y)
        RS[k] ← log(R[k]/S[k])
        T[k] ← log(τ[k]/2)
    [T; RS]
y(x) := line(Z[0], Z[1])[0] + line(Z[0], Z[1])[1]*x  # error: This variable is undefined.
yy(x) := line(Zz[0], Zz[1])[0] + line(Zz[0], Zz[1])[1]*x
H := line(Z[0], Z[1])[1]  # error: This variable is undefined.
H =  # error: This variable is undefined.
Hh := line(Zz[0], Zz[1])[1]
Hh = 0.499116
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